// COMSOL Multiphysics 5.6.0.280 model "CPW impedance model.mph"
// Outline of the model tree

Parameters
  S1 = 0.5[mm]  // bottom S (rezonit value)
  S2 = S1 - 2*t*tan(a/180*pi)  // top S
  W1 = 0.15[mm]  // bottom W (rezonit value)
  W2 = W1 + 2*(t-dt)*tan(a/180*pi)  // top W
  t = 0.045[mm]  // thikness of metallisation
  g = 0.3[mm]  // gap up to vias (variable)
  H1 = 1.27[mm]  // bottom substrate thikness
  H2 = 1.27[mm]  // top substrate thikness
  a = 5  // etching angle
  e1 = 10.6
  e2 = 10.6
  dt = 0.001[mm]  // reducing of central strip thikness compared with ground layer
  r_fillet = 0.005[mm]  // fillet radius
  glue_Z = 0.0015[mm]  // glue thikness of structure (just for physical stabilyty of model)
  boards_thikness = 0.03[mm]  // thikness of externall metallisation
  Freq = 1[GHz]

Variables
  var1 "Variables 1"
    V = int_E(-emw.Ex*t1x-emw.Ey*t1y)  // Voltage
    I = -int_H(emw.Hx*t1x+emw.Hy*t1y)  // Current
    Z_model = V/I  // Characteristic impedance

Couplings
  intop1: Integration on boundaries 12, 17 | opname = int_E
  intop2: Integration on boundaries 14-16, 18, 20, 26, 27, 29 | opname = int_H

Geometry
  geom1 "Geometry 1" (2D, length unit mm)
    pol1: Polygon | source = table; table = {{S1/2, 0}, {S2/2, t-dt}, {-S2/2, t-dt}, {-S1/2, 0}}
    pol2: Polygon | source = table; table = {{S1/2 + W1, 0}, {S2/2 + W2, t}, {S1/2 + W1 + g, t}, {S1/2 + W1 + g, 0}}
    fil1: Fillet | point = pol1(1) points 1-4; pol2(1) points 1; radius = r_fillet
    mir1: Mirror | input = fil1(2); keep = on
    mir2: Mirror | input = mir1, fil1(2); keep = on; pos = {0, t}; axis = {0, 1}
    pol3: Polygon
      source = table
      table = 
        {S1/2 + W1 + g, glue_Z}
        {S1/2 + W1 + g, -H1}
        {-(S1/2 + W1 + g), -H1}
        {-(S1/2 + W1 + g), glue_Z}
    pol4: Polygon
      source = table
      table = 
        {S1/2 + W1 + g, 2*t-glue_Z}
        {S1/2 + W1 + g, 2*t+H2}
        {-(S1/2 + W1 + g), 2*t+H2}
        {-(S1/2 + W1 + g), 2*t-glue_Z}
    pol6: Polygon
      source = table
      table = {{-(S2/2 + W2), -2*t}, {-(S2/2 + W2), 4*t}, {(S2/2 + W2), 4*t}, {(S2/2 + W2), -2*t}}
    ls2: LineSegment
      specify1 = coord
      coord1 = {-(S1/2 + W1/2), -H1/2}
      specify2 = coord
      coord2 = {-(S1/2 + W1/2), H2/2 + t}
    ls3: LineSegment
      specify1 = coord
      coord1 = {(S1/2 + W1/2), -H1/2}
      specify2 = coord
      coord2 = {(S1/2 + W1/2), H2/2 + t}
    ls4: LineSegment | vertex1 = ls2(1) points 2; vertex2 = ls3(1) points 2
    ls5: LineSegment | vertex1 = ls2(1) points 1; vertex2 = ls3(1) points 1
    uni1: Union | input = mir1, mir2, fil1(2); intbnd = off; edge = all
    par1: Partition "Partition Objects 1" | input = pol6; tool = pol3, pol4, uni1, fil1(1); keeptool = on
    par2: Partition "Partition Objects 2" | input = pol3, pol4; tool = uni1, fil1(1); keeptool = on
    del1: Delete "Delete Entities 1" | input = par1(1) domains 1-4, 6-13; par2(2) domains 1, 3; par2(1) domains 2-4
    pol7: Polygon
      source = table
      table = 
        {S1/2 + W1 + g + boards_thikness, 2*t+H2 + boards_thikness}
        {-(S1/2 + W1 + g) - boards_thikness, 2*t+H2 + boards_thikness}
        {-(S1/2 + W1 + g) - boards_thikness, -H1 - boards_thikness}
        {(S1/2 + W1 + g) + boards_thikness, -H1 - boards_thikness}
    par3: Partition "Partition Objects 3" | input = pol7; tool = del1, uni1; keeptool = on
    del2: Delete "Delete Entities 2" | input = par3(1) domains 2-7
    uni2: Union | input = del2, uni1; intbnd = off; edge = all
    fin: Finalize "Form Union"

Materials
  mat1: Common "Perfect vacuum" on domains 4, 6, 9
    def "Basic"
      density = 0
      relpermeability = 1
      relpermittivity = 1
      electricconductivity = 0
  mat2: Common "bottom substr" on domains 2, 5
    def "Basic"
      density = 0
      relpermeability = 1
      relpermittivity = e1
      electricconductivity = 0
  mat3: Common "top substr" on domains 3, 7
    def "Basic"
      density = 0
      relpermeability = 1
      relpermittivity = e2
      electricconductivity = 0
  mat4: Common "metall" on domains 1, 8
    def "Basic"
      density = 0
      relpermeability = 1
      relpermittivity = 1
      electricconductivity = 1e9

Physics
  emw: ElectromagneticWaves "Electromagnetic Waves, Frequency Domain" on domains 1-9
    dependent variable E = {Ex, Ey, Ez}
    components.components = threecomponent
    BackgroundField.SolveFor = fullField
    AnalysisMethodology.MethodologyOptions = Robust
    wee1: WaveEquationElectric (default)
    pec1: PerfectElectricConductor (default)
    init1: init "Initial Values 1" (default)

Mesh
  mesh6 "Mesh Low quality"
    ftri1: FreeTri "Free Triangular 1" on domains 1-7, 9
    ftri2: FreeTri "Free Triangular 2" on domains 8 | xscale = 2; yscale = S1/t/2
    bl1: BndLayer "Boundary Layers 1" on domains 1, 8
      blp: BndLayerProp "Boundary Layer Properties" on boundaries 4-11, 21-24, 31-36, 38-51
        blnlayers = 12
        inittype = blhmin
        blhmin = 0.00001
  mesh2 "Mesh Intermediate"
    size: MeshSizeDefault | hauto = 1
    ftri1: FreeTri "Free Triangular 1" on domains 1-7, 9
    ftri2: FreeTri "Free Triangular 2" on domains 8 | xscale = 2; yscale = S1/t/2
    bl1: BndLayer "Boundary Layers 1" on domains 1, 8
      blp: BndLayerProp "Boundary Layer Properties" on boundaries 4-11, 21-24, 31-36, 38-51
        blnlayers = 13
        inittype = blhmin
        blhmin = 0.00001
  mesh4 "Mesh High quality"
    size: MeshSizeDefault | hauto = 1
    ftri1: FreeTri "Free Triangular 1" on domains 1-7, 9
    ftri2: FreeTri "Free Triangular 2" on domains 8 | xscale = 2; yscale = S1/t/2
    bl1: BndLayer "Boundary Layers 1" on domains 1, 8
      blp: BndLayerProp "Boundary Layer Properties" on boundaries 4-11, 21-24, 31-36, 38-51
        blnlayers = 13
        inittype = blhmin
        blhmin = 0.00001
    ref1: Refine on entire geometry

Studies
  std2 "Study (mech adaptation)"
    mode: ModeAnalysis (disabled) | modeFreq = 1[GHz]; neigs = 1; shift = 2.5; conrad = 1; mesh = {geom1, mesh6}
  std1 "Study SW"
    param: Parametric "Parametric Sweep" | pname = W1; plistarr = range(0.15,0.0590909090909,0.8); punit = mm
    opt: Optimization
      opttol = 0.001
      optobj = abs(abs(comp1.Z_model)-50)
      descr = Characteristic impedance
      initval = 0.5[mm]
      scale = 1[mm]
      lbound = 0.125[mm]
      ubound = 1[mm]
      pname = S1
    mode: ModeAnalysis | modeFreq = Freq; neigs = 1; shift = 2.5; conrad = 1; mesh = {geom1, mesh4}

Solver configurations
  sol1 "Solution 1" (study std1)
    v1: Variables "Dependent Variables 1"
    e1: Eigenvalue "Eigenvalue Solver 1" | neigs = 1; shift = 2.5
      d1: Direct "Suggested Direct Solver (emw)"
  sol13 "Solution 13" (study std2)
  sol14 "Parametric Solutions 2" (study std1)

Datasets
  dset1: Solution | solution = sol1
  dset3: Solution | solution = sol13
  dset4: Solution | solution = sol14

Derived values
  gev1: EvalGlobal "Global Evaluation 1" | data = dset1; table = tbl1; expr = abs(Z_model); unit = Ω

Evaluation groups
  eg1: EvaluationGroup | data = dset1
    gev1: EvalGlobal "Global Evaluation 1"
      data = dset4
      expr = {opt.obj1, W1 + S1, 2*W1 + S1}
      unit = {, mm, mm}
      descr = {Characteristic impedance, , }

Tables
  tbl1: Table
    // Global Evaluation 1
    Effective mode index | abs(Z_model) (Ω)
    2.55233-0.00077846i | 51.3871
  tbl3: Table "Objective Table 3"
    W1 (mm) | S1 (m) | Objective
    0.15 | 0.0005 | 13.509
    0.15 | 0.0008 | 22.3807
    0.15 | 0.0002 | 6.7696
    0.15 | 0.00035 | 6.07307
    0.15 | 0.0005 | 13.509
    0.15 | 0.000275 | 0.717627
    0.15 | 0.0002 | 6.7696
    0.15 | 0.0003125 | 3.59569
    0.15 | 0.0002375 | 2.66292
    0.15 | 0.00025625 | 0.89664
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
Plots
  pg5: PlotGroup2D "Electric Field (emw)" | data = dset4
    surf1: Surface | expr = emw.normE
    con1: Contour | expr = emw.normE
    arws1: ArrowSurface | expr = {emw.Ex, emw.Ey}; xnumber = 30; ynumber = 30; arrowlength = logarithmic
  pg6: PlotGroup2D "Magnetic Field (emw)" | data = dset4
    surf1: Surface | expr = emw.normH
    con1: Contour | expr = emw.normH
    arws1: ArrowSurface | expr = {emw.Hx, emw.Hy}; xnumber = 30; ynumber = 30; arrowlength = logarithmic
  pg7: PlotGroup1D "1D Plot Group 7" | data = dset1; xlabel = S1 (mkm); ylabel = W1 (mkm)
    tblp1: Table "Table Graph 1"
      source = evaluationgroup
      table = tbl1
      xaxisdata = 2
      plotcolumninput = manual
      plotcolumns = 1
      preprocx = linear
      scalingx = 1e6
      preprocy = linear
      scalingy = 1e3